# 24. IV. б) Расчет вала | Двигатель 2ПН160М:
ndn := 1500
ω_d := ndn*2*π/60
ω_I := ω_d = 157.08
ω_III := 15
M_пmax := 894.937
l1 := 0.45
l2 := 0.19
l3 := 0.3
γ1 := 15
γ2 := 60
z1 := 20
z2' := 26
E_пр := 2*10^11
σ_ив := 4*10^7
σ_k3 := 10^9
σ_смIII := 1.8*10^8
σ_из := 2*10^8
α := 20*deg
τ_cpIII := 1.2*10^8
ψ := 0.3
η_3 := 0.97
η_II := 0.99
# 1. Определение мощности на валах редуктора
N_III := M_пmax*ω_III
N_II := N_III/(η_3*η_II)
N_I := N_II/(η_3*η_II)
# 2. Кинематический расчет передаточного механизма(редуктора)
# a) Передаточное число редуктора
u_I_III := |ω_I/ω_III| = 10.472
# в) Разбить общее передаточное число на  частные передаточные числа отдельных передач
u_1_2 := sqrt(u_I_III) = 3.23604
u_2'_3 := sqrt(u_I_III)
# г) Определить недостающие числа зубьев и округлить их до ближайщих целых чисел
z2 := z1*u_1_2
z2 = 64.7209
z3 := z2'*u_2'_3
z3 = 84.1371
z2 := 65
z3 := 84
# д) Определить уточненные передаточные числа
u12y := z2/z1 = 3.25
u2'3y := z3/z2' = 3.23077
# д) Определить уточненные угловые скорости
ω_I := ω_d
ω_IIy := ω_I/u12y
ω_IIIy := ω_I/(u12y*u2'3y)
ω_IIIy = 14.96
# ж) Оценить ошибку по ωIII
Δω_III := (ω_IIIy - ω_III)/ω_III
Δω_III*100 = -0.2669
# 3. Определение геометрических размеров редуктора
# а) Определить межосевые расстояния из условия прочности зубьев
a12р := u12y^3*sqrt((0.418/(u12y*σ_k3))^2*2*N_II*E_пр/(ω_IIy*ψ*sin(2*α)))
a2'3р := u2'3y^3*sqrt((0.418/(u2'3y*σ_k3))^2*2*N_III*E_пр/(ω_IIIy*ψ*sin(2*α)))
# б) Найти расчетные модули зубьев
m1р := 2*a12р/(z1 + z2)
m2р := 2*a2'3р/(z2' + z3)
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m1р = 0.00254454
m2р = 0.00342245
m1 := 2.5*10^-3
m2 := 3.5*10^-3
# г) Уточнить межосевые расстояния
a12 := m1*(z1 + z2)/2 = 0.10625
a2'3 := m2*(z2' + z3)/2 = 0.1925
# д) Определить толщину зубчатых венцов
b1 := ψ*a12 = 0.031875
b2 := ψ*a2'3 = 0.05775
# e) Определить радиусы делительных окружностей
r1 := m1*z1/2 = 0.025
r2 := m1*z2/2 = 0.08125
r2' := m2*z2'/2 = 0.0455
r3 := m2*z3/2 = 0.147
# 4. Расчет усилий, действующих на зубья колес промежуточного редуктора
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# б) Определить окружные силы, действующие на промежуточный вал
Fτ12 := N_II/(r2*ω_IIy)
Fτ32' := N_II/(r2'*ω_IIy)
# б) Определить радиальные силы, действующие на промежуточный вал
Fr12 := Fτ12*tan(α)
Fr32' := Fτ32'*tan(α)
# в) Определить нормальные силы, действующие на промежуточный вал
Fn12 := sqrt(Fτ12^2 + Fr12^2)
Fn32' := sqrt(Fτ32'^2 + Fr32'^2)
# 5. Проверка зубьев на изгибную прочность по формулам
σи1 := Fn12*4.12/(b1*m1) = 195856553
σи2 := Fn12*3.73/(b1*m1) = 177316733
σи2' := Fn32'*3.96/(b2*m2) = 132531227
σи3 := Fn32'*3.73/(b2*m2) = 124833706
# 6. Определение внешних усилий действующих на промежуточный вал
# а) Вычислить проекции сил, действующих на зубья колес, на оси xO2y
Fτ12x := Fτ12*cos(345 deg)
Fτ12y := Fτ12*sin(345 deg)
Fτ32'x := Fτ32'*cos(300 deg)
Fτ32'y := Fτ32'*sin(300 deg)
Fr12x := Fr12*cos(255 deg)
Fr12y := Fr12*sin(255 deg)
Fr32'x := Fr32'*cos(30 deg)
Fr32'y := Fr32'*sin(30 deg)
Fn12x := Fn12*cos(325 deg)
Fn12y := Fn12*sin(325 deg)
Fn32'x := Fn32'*cos(320 deg)
Fn32'y := Fn32'*sin(320 deg)
# Проверка:
F12x := Fτ12x + Fr12x = 3103.1
Fn12x = 3103.1
F12y := Fτ12y + Fr12y = -2172.81
Fn12y = -2172.81
F32'x := Fτ32'x + Fr32'x = 5182
Fn32'x = 5182
F32'y := Fτ32'y + Fr32'y = -4348.21
Fn32'y = -4348.21
# б) Определить крутящий момент, который возникает при приведении полученных выше сил к оси вала
Mкр := Fτ12*r2 = 289.228
Mкр := Fτ32'*r2' = 289.228
# в) В горизонатальной и вертикальной плоскостях определить из уравнений статики определить опорные реакции в O2
R2x := -(F12x + F32'x)
R2y := -(F12y + F32'y)
# 7. Определение внутренних усилий и построение эпюр
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# а) По соответствующим зависимостям в горизонтальной и вертикальной плоскости  построить эпюры поперечных сил и изгибающих моментов
